h := 0.01
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p(x) := -0.5*x
q(x) := 1
f(x) := -2
c := 0.4
a := 1.2
λ1 := 1
l := 0.7
α := 1/2
b := 0.7
λ2 := 2
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f1(x, y, z) := z
f2(x, y, z) := -p(x)*z - q(x)*y - f(x)
n := (l - c)/h
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y[0] := a
EIL(λ) :=
    z[0] ← λ
    for i ∈ 0 .. n
        x[i] ← c + h*i
    for i ∈ 0 .. n
        y[i + 1] ← y[i] + h*f1(x[i], y[i], z[i])
        z[i + 1] ← z[i] + h*f2(x[i], y[i], z[i])
    [y; z]
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[y; z] := EIL(λ1)
[y'; z'] := EIL(λ2)
b1 := z[n] + α*y[n] = 2.05801
b2 := z'[n] + α*y'[n] = 3.25099
λ := λ1 + (λ2 - λ1)*(b - b1)/(b2 - b1) = -0.138341
[y''; z''] := EIL(λ)
k := 0 .. n
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