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h := 0.1
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α1 := 1
a := 0.4
β1 := 0
A := 1.2
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α2 := 1
b := 0.7
β2 := 2
B := 1.4
n := (b - a)/h = 3
x :=
    for i ∈ 0 .. n
        x[i] ← a + i*h
    x
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p(x) := -0.5*x
q(x) := 1
f(x) := 2
x = [0.4; 0.5; 0.6; 0.7]
# Аппроксимация граничных условий формулой (7)
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# Краевые узлы:
y[0]*(α1 - β1/h) + y[1]*β1/h - A
y[3]*(α2 + β2/h) - y[2]*β2/h - B
# Промежуточные узлы
y[0]*(1/h^2 - p(x[1])/(2*h)) + y[1]*(-2/h^2 + q(x[1])) + y[2]*(1/h^2 + p(x[1])/(2*h)) - f(x[1])
y[1]*(1/h^2 - p(x[2])/(2*h)) + y[2]*(-2/h^2 + q(x[2])) + y[3]*(1/h^2 + p(x[2])/(2*h)) - f(x[2])
coefs := [
    α1 - β1/h, β1/h, 0, 0;
    0, 0, -β2/h, α2 + β2/h;
    1/h^2 - p(x[1])/(2*h), -2/h^2 + q(x[1]), 1/h^2 + p(x[1])/(2*h), 0;
    0, 1/h^2 - p(x[2])/(2*h), -2/h^2 + q(x[2]), 1/h^2 + p(x[2])/(2*h)
]
free := [A; B; f(x[1]); f(x[2])]
y' := lsolve(coefs, free) = [1.2; 1.19354; 1.19508; 1.20483]
k := 0 .. n
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# Аппроксимация граничных условий формулой (7а)
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α1*y[0] + β1*((-3*y[0] + 4*y[1] - y[2])/(2*h)) - A
α2*y[3] + β2*((y[1] - 4*y[2] + 3*y[3])/(2*h)) - B
# Краевые узлы:
y[0]*(α1 - 3*β1/(2*h)) + y[1]*4*β1/(2*h) + y[2]*(-β1/(2*h)) - A
y[3]*(α2 + 3*β2/(2*h)) + y[2]*(-4*β2/(2*h)) + y[1]*(β2/(2*h)) - B
# Промежуточные узлы
y[0]*(1/h^2 - p(x[1])/(2*h)) + y[1]*(-2/h^2 + q(x[1])) + y[2]*(1/h^2 + p(x[1])/(2*h)) - f(x[1])
y[1]*(1/h^2 - p(x[2])/(2*h)) + y[2]*(-2/h^2 + q(x[2])) + y[3]*(1/h^2 + p(x[2])/(2*h)) - f(x[2])
coefs := [
    α1 - 3*β1/(2*h), 4*β1/(2*h), -β1/(2*h), 0;
    0, β2/(2*h), -4*β2/(2*h), α2 + 3*β2/(2*h);
    1/h^2 - p(x[1])/(2*h), -2/h^2 + q(x[1]), 1/h^2 + p(x[1])/(2*h), 0;
    0, 1/h^2 - p(x[2])/(2*h), -2/h^2 + q(x[2]), 1/h^2 + p(x[2])/(2*h)
]
free := [A; B; f(x[1]); f(x[2])]
y := lsolve(coefs, free) = [1.2; 1.19006; 1.18808; 1.19427]
y' = [1.2; 1.19354; 1.19508; 1.20483]
k := 0 .. n
R :=
    for i ∈ 0 .. n
        R[i] ← |y[i] - y'[i]|
    R
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max(R) = 0.0105636
i := 0 .. n
# График решения с использованием формулы 7(а) | График решения с испольованием формулы (7)
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