h := 0.1
endT := 0.02
endX := 0.6
σ := 1/6
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f(x) := 3*x*(2 - x)
φ(t) := 0
τ := σ*h^2
ψ(t) := t + 2.52
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lenX := endX/h = 6
lenT := endT/τ = 12
x :=
    for i ∈ 0 .. lenX
        x[i] ← i*h
    x
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t :=
    for i ∈ 0 .. lenT
        t[i] ← i*τ
    t
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u :=
    for i ∈ 0 .. lenX
        u[i, 0] ← f(x[i])
    for j ∈ 0 .. lenT
        u[0, j] ← φ(t[j])
        u[lenX, j] ← ψ(t[j])
    for j ∈ 0 .. lenT - 1
        for i ∈ 1 .. lenX - 1
            u[i, j + 1] ← 1/6*(u[i + 1, j] + 4*u[i, j] + u[i - 1, j])
    u
    = [
        0, 0, 0, 0, 0, 0, 0, 0, 0, 0, 0, 0, 0;
        0.57, 0.56, 0.551667, 0.544444, 0.538009, 0.53216, 0.526768, 0.521747, 0.517036, 0.512594, 0.508393, 0.504408, 0.500623;
        1.08, 1.07, 1.06, 1.05028, 1.04093, 1.03197, 1.02341, 1.01523, 1.00742, 0.999978, 0.992877, 0.986109, 0.979659;
        1.53, 1.52, 1.51, 1.5, 1.4901, 1.4804, 1.47098, 1.46188, 1.45314, 1.44476, 1.43675, 1.42911, 1.42184;
        1.92, 1.91, 1.9, 1.89032, 1.88108, 1.87229, 1.86396, 1.85606, 1.84858, 1.8415, 1.8348, 1.82845, 1.82244;
        2.25, 2.24, 2.23194, 2.22519, 2.21934, 2.21419, 2.20956, 2.20537, 2.20153, 2.19801, 2.19476, 2.19175, 2.18896;
        2.52, 2.52167, 2.52333, 2.525, 2.52667, 2.52833, 2.53, 2.53167, 2.53333, 2.535, 2.53667, 2.53833, 2.54
    ]
# [component: inputs u]
