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F2(s) := 0.9*sqrt(0.9) + sin(s)
F3(s) := 0.9*sqrt(0.9) + sin(s)
F1(s) := s*sqrt(s)
F4(s) := s*sqrt(s)
l := 0.9
h := 0.3
τ := 0.3
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nX := l/h = 3
nT := l/τ = 3
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S := [0; 0.3; 0.6; 0.9]
u :=
    δ ← (F2(0.3) - F1(0.3))/3
    δ' ← (F2(0.6) - F1(0.6))/3
    u[12] ← F1(0.3) + δ
    u[22] ← F1(0.3) + 2*δ
    u[11] ← F1(0.6) + δ'
    u[21] ← F1(0.6) + 2*δ'
    for i ∈ 0 .. nX
        u[0, i] ← F1(S[i])
    for i ∈ 1 .. nX
        u[i, 0] ← F3(S[i])
    for i ∈ 1 .. nX
        u[i, nX] ← F4(S[i])
    for i ∈ 1 .. nX - 1
        u[nX, i] ← F2(S[i])
    α ← h^2/τ^2
    stopCondition ← 1
    while stopCondition
        u' ← u
        for i ∈ 1 .. nX - 1
            for j ∈ 1 .. nT - 1
                u'[i, j] ← 1/(2 + 2*α)*(u[i - 1, j] + u[i + 1, j] + α*u[i, j + 1] + α*u[i, j - 1])
                stopCondition ← 0 if |u'[i, j] - u[i, j]| < 10^-4
        u ← u'
    u
    = [
        0, 0.164317, 0.464758, 0.853815;
        1.14934, 0.727924, 0.55678, 0.164317;
        1.41846, 1.04146, 0.870315, 0.464758;
        1.63714, 1.14934, 1.41846, 0.853815;
        0, 0, 0, 0;
        0, 0, 0, 0;
        0, 0, 0, 0;
        0, 0, 0, 0;
        0, 0, 0, 0;
        0, 0, 0, 0;
        0, 0, 0, 0;
        0.782658, 0, 0, 0;
        0.492656, 0, 0, 0;
        0, 0, 0, 0;
        0, 0, 0, 0;
        0, 0, 0, 0;
        0, 0, 0, 0;
        0, 0, 0, 0;
        0, 0, 0, 0;
        0, 0, 0, 0;
        0, 0, 0, 0;
        1.10056, 0, 0, 0;
        0.820996, 0, 0, 0
    ]
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# [component: inputs u]
