h := 0.1
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endX := 1
endT := 0.5
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τ := h
f(x) := 2*x*(x + 1) + 0.3
φ(t) := 0.3
ψ(t) := 4.3 + t
Φ(x) := 2*sin(x)
lenX := endX/h = 10
lenT := endT/τ = 5
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x :=
    for i ∈ 0 .. lenX
        x[i] ← i*h
    x
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t :=
    for i ∈ 0 .. lenT
        t[i] ← i*τ
    t
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u :=
    for i ∈ 0 .. lenX
        u[0, i] ← f(x[i])
    for j ∈ 0 .. lenT
        u[0, j] ← φ(t[j])
        u[lenX, j] ← ψ(t[j])
    for i ∈ 1 .. lenX - 1
        u[1, i] ← 0.5*(u[0, i - 1] + u[0, i + 1]) + h*Φ(x[i])
    for i ∈ 1 .. lenX - 1
        for j ∈ 1 .. lenT
            u[i, j + 1] ← u[i + 1, j] + u[i - 1, j] - u[i, j - 1]
    u
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# [component: inputs u]
u = [
    0.3, 0.3, 0.3, 0.3, 0.3, 0.3, 2.22, 2.68, 3.18, 3.72, 4.3;
    0, 0.319967, 0.3, -0.0199667, 0, 0.319967, 0.3, 2.82884, 3.34347, 3.89667, 0;
    0, 0, 0.319967, 0.3, -0.339933, -0.3, 0.6599, 0, 0, 0, 0;
    0, 0, 0, 0.319967, 0.3, -0.6599, -0.6, 0, 0, 0, 0;
    0, 0, 0, 0, 0.319967, 0.3, -0.979867, 0, 0, 0, 0;
    0, 0, 0, 0, 0, 0.319967, 0.3, 0, 0, 0, 0;
    0, 0, 0, 0, 0, 0, 0.319967, 0, 0, 0, 0;
    0, 0, 0, 0, 0, 0, 0, 0, 0, 0, 0;
    0, 0, 0, 0, 0, 0, 0, 0, 0, 0, 0;
    0, 0, 4.4, 4.5, 0.2, 0.2, 4.6, 0, 0, 0, 0;
    4.3, 4.4, 4.5, 4.6, 4.7, 4.8, 0, 0, 0, 0, 0
]
