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A := [-0.25, -1.1; 0.1, -0.2]
X := [2.8; -3.1]
T := 8.5
N := 10
n := 2^N
h := T/n = 0.00830078
Λ(h) :=
    Λ ← (identity(rows(A)) - h/2*A + h^2/12*A^2)^-1*(identity(rows(A)) + h/2*A + h^2/12*A^2)
    Λ
KN(n) :=
    h ← T/n
    Λ ← Λ(h)
    x[0] ← (Λ^n)^-1*X
    for i ∈ 0 .. 2^N
        x[i + 1] ← Λ*x[i]
    x
x := KN(n)
x' := KN(n/2)
i := 0 .. n
[x0[i]; x1[i]] := x[i]
[X0[i]; X1[i]] := x'[i]
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i := 0 .. n/2
R[i] := |x[2*i] - x'[i]|/31
max(R) = 1.7872e-11
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